geometry

#MACH
0.030000

#IYsym IZsym Zsym
0 0 0

#Sref Cref Bref
24.0000 2.0000 12.0000

#Xref Yref Zref
2.9400 0.0000 0.0000

#CDp
0.017

#======================================================
SURFACE
WG
10 1.0 10 -1.1

COMPONENT
1

YDUPLICATE
0.0

SCALE
1.0 1.0 1.0

TRANSLATE
0.0 0.0 0.0

ANGLE
0.0

SECTION
2.20 0.00 1.15 2.00 0.00

AFILE
WG.1

CLAF
1.0936

SECTION
2.20 5.99 1.46 2.00 0.00

AFILE
WG.2

CLAF
1.0936

#======================================================
SURFACE
HT
10 1.0 10 -1.1

COMPONENT
1

YDUPLICATE
0.0

SCALE
1.0 1.0 1.0

TRANSLATE
0.0 0.0 0.0

ANGLE
0.0

SECTION
8.75 0.00 0.25 1.30 0.00

AFILE
HT.1

CLAF
1.0924

SECTION
9.12 2.50 0.25 0.80 0.00

AFILE
HT.2

CLAF
1.0924

#======================================================
SURFACE
VT
10 1.0 10 -1.1

COMPONENT
1

SCALE
1.0 1.0 1.0

TRANSLATE
0.0 0.0 0.0

ANGLE
0.0

SECTION
5.00 0.00 0.25 5.00 0.00

AFILE
VT.1

CLAF
1.0924

SECTION
8.19 0.25 0.95 2.00 0.00

AFILE
VT.2

CLAF
1.0924

SECTION
9.29 0.25 2.25 1.00 0.00

AFILE
VT.3

CLAF
1.0924
